// COMSOL Multiphysics 6.4.0.343 model "cuboid_capacitor_initial.mph"
// Outline of the model tree

Parameters
  core_temperature = 60
  width = 7[mm]
  length = 20 [mm]
  height = 10[mm]
  voltage = 10 [V]

Geometry
  geom1 "Geometry 1" (3D, length unit m)
    blk1: Block "Cuboid" | size = {width, length, height}; base = center
    wp1: WorkPlane "Plot Plane" | unite = on; contributeto = csel1
      r1: Rectangle | size = {width, length}; base = center
    fin: Finalize "Form Union"

Materials
  sw1: Switch "Material Switch 1" on domains 1
    mat4: Common "N95 (LEA_MTB)"
      def: def "Basic"
        electricconductivity = 0
      MagneticLosses: MagneticLosses
        murPrim = mu_real(root.comp1.mef.normB,root.comp1.mef.freq,core_temperature)
        murBis = mu_imag(root.comp1.mef.normB,root.comp1.mef.freq,core_temperature)
        int7: Interpolation "mu_complex"
          importedname = N49_LEA_MTB_permeability_grid.txt
          funcnametable = {{mu_real, 1}, {mu_imag, 2}}
          source = file
          filename = X:\Till_data\repositories\MPhSweepKit\examples\materials\N95_LEA_MTB_permeability_grid.txt
          struct = grid
          extrap = linear
          argunit = {T, Hz, K}
          plotfuncname = mu_real
      DielectricLoss: DielectricLoss "Dielectric losses"
        epsilonBis = eps_imag(mef.freq,core_temperature)
        epsilonPrim = eps_real(mef.freq,core_temperature)
        eta_epsilon = 0
        int1: Interpolation "eps_complex"
          importedname = N49_LEA_MTB_permittivity_grid.txt
          funcnametable = {{eps_real, 1}, {eps_imag, 2}}
          source = file
          filename = X:\Till_data\repositories\MPhSweepKit\examples\materials\N95_LEA_MTB_permittivity_grid.txt
          struct = grid
          extrap = linear
          argunit = {Hz, K}
          plotfuncname = eps_real
    mat5: Common "N49 (LEA_MTB) 1"
      def: def "Basic"
        electricconductivity = 0
      MagneticLosses: MagneticLosses
        murPrim = mu_real(root.comp1.mef.normB,root.comp1.mef.freq,core_temperature)
        murBis = mu_imag(root.comp1.mef.normB,root.comp1.mef.freq,core_temperature)
        int7: Interpolation "mu_complex"
          importedname = N49_LEA_MTB_permeability_grid.txt
          funcnametable = {{mu_real, 1}, {mu_imag, 2}}
          source = file
          filename = X:\Till_data\repositories\MPhSweepKit\examples\materials\N49_LEA_MTB_permeability_grid.txt
          struct = grid
          extrap = linear
          argunit = {T, Hz, K}
          plotfuncname = mu_real
      DielectricLoss: DielectricLoss "Dielectric losses"
        epsilonBis = eps_imag(mef.freq,core_temperature)
        epsilonPrim = eps_real(mef.freq,core_temperature)
        eta_epsilon = 0
        int1: Interpolation "eps_complex"
          importedname = N49_LEA_MTB_permittivity_grid.txt
          funcnametable = {{eps_real, 1}, {eps_imag, 2}}
          source = file
          filename = X:\Till_data\repositories\MPhSweepKit\examples\materials\N49_LEA_MTB_permittivity_grid.txt
          struct = grid
          extrap = linear
          argunit = {Hz, K}
          plotfuncname = eps_real
    mat6: Common "3F46 (LEA_MTB)"
      def: def "Basic"
        electricconductivity = 0
      MagneticLosses: MagneticLosses
        murPrim = mu_real(root.comp1.mef.normB,root.comp1.mef.freq,core_temperature)
        murBis = mu_imag(root.comp1.mef.normB,root.comp1.mef.freq,core_temperature)
        int7: Interpolation "mu_complex"
          importedname = N49_LEA_MTB_permeability_grid.txt
          funcnametable = {{mu_real, 1}, {mu_imag, 2}}
          source = file
          filename = X:\Till_data\repositories\MPhSweepKit\examples\materials\3F46_LEA_MTB_permeability_grid.txt
          struct = grid
          extrap = linear
          argunit = {T, Hz, K}
          plotfuncname = mu_real
      DielectricLoss: DielectricLoss "Dielectric losses"
        epsilonBis = eps_imag(mef.freq,core_temperature)
        epsilonPrim = eps_real(mef.freq,core_temperature)
        eta_epsilon = 0
        int1: Interpolation "eps_complex"
          importedname = N49_LEA_MTB_permittivity_grid.txt
          funcnametable = {{eps_real, 1}, {eps_imag, 2}}
          source = file
          filename = X:\Till_data\repositories\MPhSweepKit\examples\materials\3F46_LEA_MTB_permittivity_grid.txt
          struct = grid
          extrap = linear
          argunit = {Hz, K}
          plotfuncname = eps_real

Physics
  mef: ElectricInductionCurrents "Magnetic and Electric Fields" on all domains
    dependent variable A = {Ax, Ay, Az}
    fsp1: FreeSpace (default)
    mi1: MagneticInsulation (default)
      gnd1: Ground (default)
        constraintOptions = pointwiseConstraints
        constraintType = symmetricConstraint
        constraintMethod = elemental
      ein1: ElectricInsulation on boundaries 1, 2, 5, 6
      term1: Terminal on boundaries 4 | TerminalType = Voltage; V0 = voltage
      term2: Terminal on boundaries 3 | TerminalType = Voltage; V0 = 0
    init1: init "Initial Values 1" (default)
    alcs1: ElectromagneticModelSolid "Ampère's Law and Current Conservation in Solids 1" on domains 1

Mesh
  mesh1 "Mesh 1" (physics-controlled)

Studies
  std1 "Cuboid Capacitor Study"
    batsw: BatchSweep "Geometry Sweep"
      sweeptype = filled
      pname = {height, length, width}
      plistarr = {10, 20, "2, 4, 6, 8, 10"}
      punit = {mm, mm, mm}
      clustersettings = on
      batchdir = X:\Till_data\dissertation\cuboid
      maxallow = 6
    matsw: MaterialSweep | pname = matsw.comp1.sw1; plistarr = range(1,1,3); pcase = all
    param: Parametric "Excitation Sweep" | pname = {voltage, core_temperature}; plistarr = {10, 60}; punit = {V, }
    ccc: CoilCurrentCalculation "Coil Geometry Analysis" | mesh = {geom1, mesh1}
    freq: Frequency "Frequency Sweep"
      plist = range(100000,100000,500000)
      preusesol = yes
      usestol = on
      stol = 0.01
      initmethod = sol
      mesh = {geom1, mesh1}

Derived values
  int1: IntVolume "Losses"
    data = none
    table = new
    expr = {mef.Qh, mef.Qml, mef.Qrh}
    descr = {"Volumetric loss density, electromagnetic", "Volumetric loss density, magnetic", "Volumetric loss density, electric"}
  gev1: EvalGlobal "Impedance"
    data = none
    table = new
    expr = {mef.V0_1/mef.I0_1, mef.I0_1/(j*mef.omega*mef.V0_1)}
    descr = {Complex Impedance, Complex Capacitance}

Plots
  pg1: PlotGroup3D "cross-section" | data = none
    slc1: Slice "B" (disabled) | expr = mef.normB; quickplane = xy; quickznumber = 1; quickxnumber = 1; shift = -0.005
    slc2: Slice "E" (disabled) | expr = mef.normE; quickplane = xy; quickznumber = 1; quickxnumber = 1; shift = 0.005