// COMSOL Multiphysics 6.4.0.343 model "toroid_cross_section_initial.mph"
// Outline of the model tree

Parameters
  d_i = 9.6 [mm]  // inner diameter
  d_o = 16 [mm]  // outer diameter
  b_mean = 50 [mT]
  h_c = 6.3 [mm]  // height
  w = (d_o-d_i)/2  // width of the core
  core_temperature = 60
  d_bobbin = 1[mm]
  f_min = 100 [kHz]
  f_max = 1100 [kHz]
  f_step = 100 [kHz]
  r_i = d_i/2
  r_o = d_o/2
  A_eff = h_c* (r_i*r_o)/(r_o-r_i) * (log(r_o/r_i))^2
  l_eff = 2*pi*(r_i*r_o)/(r_o-r_i) * (log(r_o/r_i))
  V_eff = A_eff*l_eff

Variables
  var1 "Variables 1"
    Phi = intopFlux(real(mf.Bphi))
    b_eff = abs(intopFlux(mf.Bphi)) / A_eff
    h_eff = intopLength(current_sheet)/l_eff

Couplings
  intop3: Integration "intopFlux" on selection geom2_csel1_dom | opname = intopFlux
  intop4: Integration "intopLength" on points 2 | opname = intopLength; axisym = on

Geometry
  geom2 "Geometry" (2D axisymmetric, length unit m)
    r1: Rectangle "Toroid Rectangle" | size = {w, h_c}; pos = {r_i, -h_c/2}; contributeto = csel1
    r2: Rectangle "Winding Rectangle"
      size = {w +2*d_bobbin, 2*d_bobbin + h_c}
      pos = {r_i - d_bobbin, -h_c/2 - d_bobbin}
      contributeto = csel2
    fin: Finalize "Form Union" | symmetriccoord = 8

Materials
  mat5: Common "Air" on selection geom2_csel2_dom
    def: def "Basic"
      thermalexpansioncoefficient = alpha_p(pA,T)
      molarmass = 0.02897[kg/mol]
      bulkviscosity = muB(T)
      relpermeability = 1
      relpermittivity = 1
      dynamicviscosity = eta(T)
      ratioofspecificheat = 1.4
      electricconductivity = 0[S/m]
      heatcapacity = Cp(T)
      density = rho(pA,T)
      thermalconductivity = k(T)
      soundspeed = cs(T)
      eta: Piecewise | arg = T; pieces = {200.0, 1600.0, -8.38278E-7+8.35717342E-8*T^1-7.69429583E-11*T^2+4.6437266E-14*T^3-1.06585607E-17*T^4}; argunit = K; fununit = Pa*s
      Cp: Piecewise | arg = T; pieces = {200.0, 1600.0, 1047.63657-0.372589265*T^1+9.45304214E-4*T^2-6.02409443E-7*T^3+1.2858961E-10*T^4}; argunit = K; fununit = J/(kg*K)
      rho: Analytic | expr = pA*0.02897/R_const[K*mol/J]/T; args = {pA, T}; fununit = kg/m^3; argunit = {Pa, K}
      k: Piecewise | arg = T; pieces = {200.0, 1600.0, -0.00227583562+1.15480022E-4*T^1-7.90252856E-8*T^2+4.11702505E-11*T^3-7.43864331E-15*T^4}; argunit = K; fununit = W/(m*K)
      cs: Analytic | expr = sqrt(1.4*R_const[K*mol/J]/0.02897*T); args = T; fununit = m/s; argunit = K
      an1: Analytic | funcname = alpha_p; expr = -1/rho(pA,T)*d(rho(pA,T),T); args = {pA, T}; fununit = 1/K; argunit = {Pa, K}
      an2: Analytic "Analytic 2a" | funcname = muB; expr = 0.6*eta(T); args = T; fununit = Pa*s; argunit = K
    RefractiveIndex: RefractiveIndex
      n = 1
      ki = 0
    NonlinearModel: NonlinearModel
      BA = def.gamma-1
    idealGas: idealGas
      Rs = R_const/Mn
      heatcapacity = Cp(T)
      ratioofspecificheat = 1.4
      molarmass = 0.02897[kg/mol]
      Cp: Piecewise | arg = T; pieces = {200.0, 1600.0, 1047.63657-0.372589265*T^1+9.45304214E-4*T^2-6.02409443E-7*T^3+1.2858961E-10*T^4}; argunit = K; fununit = J/(kg*K)
  core1: Switch "Core" on selection geom2_csel1_dom
    mat6: Common "N95 (LEA_MTB)"
      def: def "Basic"
        electricconductivity = 0
      MagneticLosses: MagneticLosses
        murPrim = mu_real(root.comp1.mf.normB,root.comp1.mf.freq,core_temperature)
        murBis = mu_imag(root.comp1.mf.normB,root.comp1.mf.freq,core_temperature)
        int7: Interpolation "mu_complex"
          funcnametable = {{mu_real, 1}, {mu_imag, 2}}
          source = file
          filename = N:\groups\lea\data\Employees\tpiepe\Simulationen\02_dissertation_wip\01_materials\N95_LEA_MTB_permeability_grid.txt
          struct = grid
          extrap = linear
          argunit = {T, Hz, K}
          plotfuncname = mu_real
      DielectricLoss: DielectricLoss "Dielectric losses"
        epsilonBis = eps_imag(mf.freq,core_temperature)
        epsilonPrim = eps_real(mf.freq,core_temperature)
        eta_epsilon = 0
        int1: Interpolation "eps_complex"
          funcnametable = {{eps_real, 1}, {eps_imag, 2}}
          source = file
          filename = N:\groups\lea\data\Employees\tpiepe\Simulationen\02_dissertation_wip\01_materials\N95_LEA_MTB_permittivity_grid.txt
          struct = grid
          extrap = linear
          argunit = {Hz, K}
          plotfuncname = eps_real
    mat7: Common "N49 (LEA_MTB)"
      def: def "Basic"
        electricconductivity = 0
      MagneticLosses: MagneticLosses
        murPrim = mu_real(root.comp1.mf.normB,root.comp1.mf.freq,core_temperature)
        murBis = mu_imag(root.comp1.mf.normB,root.comp1.mf.freq,core_temperature)
        int7: Interpolation "mu_complex"
          funcnametable = {{mu_real, 1}, {mu_imag, 2}}
          source = file
          filename = N:\groups\lea\data\Employees\tpiepe\Simulationen\02_dissertation_wip\01_materials\N49_LEA_MTB_permeability_grid.txt
          struct = grid
          extrap = linear
          argunit = {T, Hz, K}
          plotfuncname = mu_real
      DielectricLoss: DielectricLoss "Dielectric losses"
        epsilonBis = eps_imag(mf.freq,core_temperature)
        epsilonPrim = eps_real(mf.freq,core_temperature)
        eta_epsilon = 0
        int1: Interpolation "eps_complex"
          funcnametable = {{eps_real, 1}, {eps_imag, 2}}
          source = file
          filename = N:\groups\lea\data\Employees\tpiepe\Simulationen\02_dissertation_wip\01_materials\N49_LEA_MTB_permittivity_grid.txt
          struct = grid
          extrap = linear
          argunit = {Hz, K}
          plotfuncname = eps_real
    mat8: Common "3F46 (LEA_MTB)"
      def: def "Basic"
        electricconductivity = 0
      MagneticLosses: MagneticLosses
        murPrim = mu_real(root.comp1.mf.normB,root.comp1.mf.freq,core_temperature)
        murBis = mu_imag(root.comp1.mf.normB,root.comp1.mf.freq,core_temperature)
        int7: Interpolation "mu_complex"
          funcnametable = {{mu_real, 1}, {mu_imag, 2}}
          source = file
          filename = N:\groups\lea\data\Employees\tpiepe\Simulationen\02_dissertation_wip\01_materials\3F46_LEA_MTB_permeability_grid.txt
          struct = grid
          extrap = linear
          argunit = {T, Hz, K}
          plotfuncname = mu_real
      DielectricLoss: DielectricLoss "Dielectric losses"
        epsilonBis = eps_imag(mf.freq,core_temperature)
        epsilonPrim = eps_real(mf.freq,core_temperature)
        eta_epsilon = 0
        int1: Interpolation "eps_complex"
          funcnametable = {{eps_real, 1}, {eps_imag, 2}}
          source = file
          filename = N:\groups\lea\data\Employees\tpiepe\Simulationen\02_dissertation_wip\01_materials\3F46_LEA_MTB_permittivity_grid.txt
          struct = grid
          extrap = linear
          argunit = {Hz, K}
          plotfuncname = eps_real

Physics
  mf: InductionCurrents "Magnetic Fields" on all domains
    dependent variable A2 = {A2x, A2y, A2z}
    components.components = inplane
    BackgroundField.SolveFor = fullField
    fsp1: FreeSpace (default)
      materialType = nonSolid
      ConstitutiveRelationBH = RelativePermeability
      ConstitutiveRelationJcE = ElectricalConductivity
      ConstitutiveRelationDE = RelativePermittivity
      delta_s = 100[m]
      freqType = from_solver
      f_typ = 50[Hz]
      f_fllb = 1[kHz]
    axi1: AxialSymmetry (default)
    mi1: MagneticInsulation (default)
      constraintOptions = pointwiseConstraints
      constraintType = symmetricConstraint
      constraintMethod = elemental
    init1: init "Initial Values 1" (default)
    als1: AmperesLawSolid "Ampère's Law in Solids 1" on all domains
      materialType = solid
      AllowSolidMaterials = 1
      ConstitutiveRelationBH = RelativePermeability
      e_crel_BH_RemanentFluxDensity = {1, 0, 0}
      MagnetizationModel = LangevinFunction
      Lfunction = 1.5e6[A/m]*((200*mf.normHeff)/((200*mf.normHeff)+1.5e6[A/m]))
      aJAm_mat = fromSusceptibility
      eHc = {1, 0, 0}
      inStationaryStudy = TransientInitialization
      ConstitutiveRelationJcE = ElectricalConductivity
      ConstitutiveRelationDE = RelativePermittivity
      shapeFunctionType = shdisc
      shapeFunctionOrder = 1
    scu1: SurfaceCurrent on boundaries 1 | Js0 = {-current_sheet, 0, 0}; coordinateSystem = sys2
    ge2: GlobalEquations "Constraint: Total Flux (real part)"
      name = current_sheet
      equation = Phi -b_mean*A_eff
      initialValueUt = 1
      valueType = complex
      fieldName = ODE3
      DependentVariableQuantity = magneticfield
      CustomDependentVariableUnit = m
      SourceTermQuantity = magneticflux
      CustomSourceTermUnit = m

Mesh
  mesh2 "Mesh 2" (physics-controlled)
    size: MeshSizeDefault | hauto = 4

Studies
  std1 "Study on Cross-Sections"
    batsw: BatchSweep "Geometry Sweep"
      pname = {h_c, d_o, d_i}
      plistarr = {6.3, 16, 9.6}
      punit = {mm, mm, mm}
      accumtable = new
      batchfile = IC.mph
      clustersettings = on
      batchdir = X:\Till_data\repositories\MPhSweepKit\mphsweepkit\examples\studies\infinite_ferrite_cross_sections\batch_data
      maxallow = 4
    matsw: MaterialSweep | pname = matsw.comp1.core1; plistarr = range(1,1,3); pcase = all
    param: Parametric "Excitation Sweep" | sweeptype = filled; pname = b_mean; plistarr = 25, 50, 75, 100; punit = mT
    freq: Frequency "Frequency Sweep"
      punit = kHz
      plist = range(f_min,f_step,f_max)
      preusesol = yes
      usestol = on
      stol = 0.01
      discretization = {mf, physics, frame:spatial2, physics, frame:material2, physics, comp1, physics}
      equationform = {mf, physics, frame:spatial2, physics, frame:material2, physics, comp1, physics}
      shapeOrder = {comp1, component}
      equationform_freq = {mf, 1[kHz], frame:spatial2, 0, frame:material2, 0, comp1, 0}

Derived values
  gev1: EvalGlobal "post-processing"
    data = none
    table = tbl2
    expr = {b_eff, h_eff, b_eff / h_eff / mu0_const, intopFlux(mf.Qh)/A_eff, intopFlux(mf.Qml)/A_eff, intopFlux(mf.Qrh)/A_eff, intopFlux(mf.Qrh)/intopFlux(mf.Qh), intopLength(current_sheet), 2*pi*mf.freq * abs(intopFlux(mf.Bphi))}
    descr = {b_eff, h_eff, mu_r (complex), p_tot, p_mag, p_el, rel. el. loss., i_1 (meas), v_2 (meas)}

Plots
  pg5: PlotGroup2D "Fields (mf)" | data = none
    surf1: Surface "B" (disabled) | expr = mf.normB
    surf2: Surface "E" (disabled) | expr = mf.normE
    surf3: Surface "H" (disabled) | expr = mf.normH
    surf4: Surface "mu_r (real)" (disabled) | expr = real(mf.Bphi / mf.Hphi) / mu0_const
    surf5: Surface "mu_r (imag)" | expr = -imag(mf.Bphi / mf.Hphi) / mu0_const