// COMSOL Multiphysics 6.4.0.343 model "core_cross_section_initial.mph"
// Outline of the model tree

Parameters
  a_e = 1 [mm]  // semi axis of ellipse
  l_r = 40 [mm]  // length of rectangle
  b_mean = 50 [mT]
  hor_slit = 100 [um]
  vert_slit = 100 [um]
  w = 7.5 [mm]  // width
  A_c = a_e*w/2*pi + l_r*w  // cross-section
  core_temperature = 60
  d_bobbin = 2[mm]
  f_min = 100 [kHz]
  f_max = 1300 [kHz]
  f_step = 100 [kHz]

Couplings
  intop1: Integration "intopFlux" on selection geom1_csel1_dom | opname = intopFlux
  intop2: Integration "intopLength" on selection geom1_csel3_bnd | opname = intopLength

Geometry
  geom1 "Geometry" (2D, length unit m)
    e1: Ellipse "Ellipse Core"
      semiaxes = {w/2, a_e}
      angle = 180
      pos = {0, l_r/2}
      iscircularsectorold = on
      contributeto = csel1
    mir2: Mirror "Mirror Ellipse Core" | input = e1; keep = on; axis = {0, 1}; contributeto = csel1
    if3: If | condition = l_r > 0
    r3: Rectangle "Rectangle Core" | size = {w, l_r}; base = center; contributeto = csel1
    endif3: EndIf
    uni3: Union "Union Core" | input = selection csel1; intbnd = off; edge = all; contributeto = csel1
    e2: Ellipse "Ellipse Region"
      semiaxes = {w/2 + d_bobbin, a_e + d_bobbin}
      angle = 180
      pos = {0, l_r/2}
      iscircularsectorold = on
      contributeto = csel3
    mir3: Mirror "Mirror Ellipse Region" | input = selection csel3; keep = on; axis = {0, 1}; contributeto = csel3
    if4: If | condition = l_r > 0
    r6: Rectangle "Rectangle Region" | size = {w + 2*d_bobbin, l_r}; base = center; contributeto = csel3
    endif4: EndIf
    uni4: Union "Union Region" | input = selection csel3; edge = all; contributeto = csel3
    if1: If | condition = hor_slit>0
    r5: Rectangle "Rectangle Horizontal Slit" | size = {w, hor_slit}; base = center; contributeto = csel5
    dif4: Difference | input = selection csel1; input2 = selection csel5; contributeto = csel1
    endif1: EndIf
    if2: If | condition = vert_slit>0
    r4: Rectangle "Rectangle Vertical Slit" | size = {vert_slit, 2*a_e + l_r}; base = center; contributeto = csel4
    dif5: Difference | input = selection csel1; input2 = selection csel4; contributeto = csel1
    endif2: EndIf
    dif3: Difference "Region - Core = Air"
      input = selection csel3
      input2 = selection csel1
      keepsubtract = on
      contributeto = csel2
    fin: Finalize "Form Union"

Materials
  mat4: Common "Air" on selection geom1_csel2_dom
    def: def "Basic"
      thermalexpansioncoefficient = alpha_p(pA,T)
      molarmass = 0.02897[kg/mol]
      bulkviscosity = muB(T)
      relpermeability = 1
      relpermittivity = 1
      dynamicviscosity = eta(T)
      ratioofspecificheat = 1.4
      electricconductivity = 0[S/m]
      heatcapacity = Cp(T)
      density = rho(pA,T)
      thermalconductivity = k(T)
      soundspeed = cs(T)
      eta: Piecewise | arg = T; pieces = {200.0, 1600.0, -8.38278E-7+8.35717342E-8*T^1-7.69429583E-11*T^2+4.6437266E-14*T^3-1.06585607E-17*T^4}; argunit = K; fununit = Pa*s
      Cp: Piecewise | arg = T; pieces = {200.0, 1600.0, 1047.63657-0.372589265*T^1+9.45304214E-4*T^2-6.02409443E-7*T^3+1.2858961E-10*T^4}; argunit = K; fununit = J/(kg*K)
      rho: Analytic | expr = pA*0.02897/R_const[K*mol/J]/T; args = {pA, T}; fununit = kg/m^3; argunit = {Pa, K}
      k: Piecewise | arg = T; pieces = {200.0, 1600.0, -0.00227583562+1.15480022E-4*T^1-7.90252856E-8*T^2+4.11702505E-11*T^3-7.43864331E-15*T^4}; argunit = K; fununit = W/(m*K)
      cs: Analytic | expr = sqrt(1.4*R_const[K*mol/J]/0.02897*T); args = T; fununit = m/s; argunit = K
      an1: Analytic | funcname = alpha_p; expr = -1/rho(pA,T)*d(rho(pA,T),T); args = {pA, T}; fununit = 1/K; argunit = {Pa, K}
      an2: Analytic "Analytic 2a" | funcname = muB; expr = 0.6*eta(T); args = T; fununit = Pa*s; argunit = K
    RefractiveIndex: RefractiveIndex
      n = 1
      ki = 0
    NonlinearModel: NonlinearModel
      BA = def.gamma-1
    idealGas: idealGas
      Rs = R_const/Mn
      heatcapacity = Cp(T)
      ratioofspecificheat = 1.4
      molarmass = 0.02897[kg/mol]
      Cp: Piecewise | arg = T; pieces = {200.0, 1600.0, 1047.63657-0.372589265*T^1+9.45304214E-4*T^2-6.02409443E-7*T^3+1.2858961E-10*T^4}; argunit = K; fununit = J/(kg*K)
  sw1: Switch "Core" on selection geom1_csel1_dom
    mat6: Common "N95 (LEA_MTB)"
      def: def "Basic"
        electricconductivity = 0
      MagneticLosses: MagneticLosses
        murPrim = mu_real(root.comp1.mf.normB,root.comp1.mf.freq,core_temperature)
        murBis = mu_imag(root.comp1.mf.normB,root.comp1.mf.freq,core_temperature)
        int7: Interpolation "mu_complex"
          funcnametable = {{mu_real, 1}, {mu_imag, 2}}
          source = file
          filename = N:\groups\lea\data\Employees\tpiepe\Simulationen\02_dissertation_wip\01_materialsN95_LEA_MTB_permeability_grid.txt
          struct = grid
          extrap = linear
          argunit = {T, Hz, K}
          plotfuncname = mu_real
      DielectricLoss: DielectricLoss "Dielectric losses"
        epsilonBis = eps_imag(mf.freq,core_temperature)
        epsilonPrim = eps_real(mf.freq,core_temperature)
        eta_epsilon = 0
        int1: Interpolation "eps_complex"
          funcnametable = {{eps_real, 1}, {eps_imag, 2}}
          source = file
          filename = N:\groups\lea\data\Employees\tpiepe\Simulationen\02_dissertation_wip\01_materials\N95_LEA_MTB_permittivity_grid.txt
          struct = grid
          extrap = linear
          argunit = {Hz, K}
          plotfuncname = eps_real
    mat7: Common "N49 (LEA_MTB)"
      def: def "Basic"
        electricconductivity = 0
      MagneticLosses: MagneticLosses
        murPrim = mu_real(root.comp1.mf.normB,root.comp1.mf.freq,core_temperature)
        murBis = mu_imag(root.comp1.mf.normB,root.comp1.mf.freq,core_temperature)
        int7: Interpolation "mu_complex"
          funcnametable = {{mu_real, 1}, {mu_imag, 2}}
          source = file
          filename = N:\groups\lea\data\Employees\tpiepe\Simulationen\02_dissertation_wip\01_materials\N49_LEA_MTB_permeability_grid.txt
          struct = grid
          extrap = linear
          argunit = {T, Hz, K}
          plotfuncname = mu_real
      DielectricLoss: DielectricLoss "Dielectric losses"
        epsilonBis = eps_imag(mf.freq,core_temperature)
        epsilonPrim = eps_real(mf.freq,core_temperature)
        eta_epsilon = 0
        int1: Interpolation "eps_complex"
          funcnametable = {{eps_real, 1}, {eps_imag, 2}}
          source = file
          filename = N:\groups\lea\data\Employees\tpiepe\Simulationen\02_dissertation_wip\01_materials\N49_LEA_MTB_permittivity_grid.txt
          struct = grid
          extrap = linear
          argunit = {Hz, K}
          plotfuncname = eps_real
    mat8: Common "3F46 (LEA_MTB)"
      def: def "Basic"
        electricconductivity = 0
      MagneticLosses: MagneticLosses
        murPrim = mu_real(root.comp1.mf.normB,root.comp1.mf.freq,core_temperature)
        murBis = mu_imag(root.comp1.mf.normB,root.comp1.mf.freq,core_temperature)
        int7: Interpolation "mu_complex"
          funcnametable = {{mu_real, 1}, {mu_imag, 2}}
          source = file
          filename = N:\groups\lea\data\Employees\tpiepe\Simulationen\02_dissertation_wip\01_materials\3F46_LEA_MTB_permeability_grid.txt
          struct = grid
          extrap = linear
          argunit = {T, Hz, K}
          plotfuncname = mu_real
      DielectricLoss: DielectricLoss "Dielectric losses"
        epsilonBis = eps_imag(mf.freq,core_temperature)
        epsilonPrim = eps_real(mf.freq,core_temperature)
        eta_epsilon = 0
        int1: Interpolation "eps_complex"
          funcnametable = {{eps_real, 1}, {eps_imag, 2}}
          source = file
          filename = N:\groups\lea\data\Employees\tpiepe\Simulationen\02_dissertation_wip\01_materials\3F46_LEA_MTB_permittivity_grid.txt
          struct = grid
          extrap = linear
          argunit = {Hz, K}
          plotfuncname = eps_real

Physics
  mf: InductionCurrents "Magnetic Fields" on all domains
    dependent variable A2 = {A2x, A2y, A2z}
    components.components = inplane
    BackgroundField.SolveFor = fullField
    fsp1: FreeSpace (default)
    mi1: MagneticInsulation (default)
    init1: init "Initial Values 1" (default)
    als1: AmperesLawSolid "Ampère's Law in Solids 1" on all domains
    scu1: SurfaceCurrent on boundaries 15, 16, 19, 20 | Js0 = {current/1[m], 0, 0}; coordinateSystem = sys1
    ge2: GlobalEquations "Constraint: Total Flux (real part)"
      name = current
      equation = A_c*b_mean - intopFlux(real(mf.BZ))
      initialValueU = 0
      initialValueUt = 1
      valueType = complex
      fieldName = ODE3
      DependentVariableQuantity = current
      CustomDependentVariableUnit = m
      SourceTermQuantity = magneticflux
      CustomSourceTermUnit = m

Mesh
  mesh1 "Mesh" (physics-controlled)
    size: MeshSizeDefault | hauto = 3

Studies
  std1 "Study on Cross-Sections"
    batsw: BatchSweep "Geometry Sweep"
      pname = {hor_slit, vert_slit, w, l_r, a_e}
      plistarr = {, , "5, 10, 15", , }
      punit = {um, um, mm, mm, mm}
      accumtable = new
      batchfile = IC.mph
      clustersettings = on
      batchdir = X:\Till_data\repositories\hybridmag\hybridmag\dev\comsol_link\example__batch_simulation\batch_data
      specserverdir = on
      serverdir = X:\Till_data\repositories\hybridmag\hybridmag\dev\comsol_link\example__batch_simulation\batch_data
      maxallow = 4
    matsw: MaterialSweep | pname = matsw.comp1.sw1; plistarr = 3; pcase = user
    param: Parametric "Excitation Sweep" | sweeptype = filled; pname = b_mean; plistarr = 25, 50, 75, 100; punit = mT
    freq: Frequency "Frequency Sweep"
      punit = kHz
      plist = range(f_min,f_step,f_max)
      preusesol = yes
      usestol = on
      stol = 0.01
      discretization = {mf, physics, frame:spatial1, physics, frame:material1, physics, comp1, physics}
      equationform = {mf, physics, frame:spatial1, physics, frame:material1, physics, comp1, physics}
      equationform_freq = {mf, 1[kHz], frame:spatial1, 0, frame:material1, 0, comp1, 0}

Solver configurations
  sol1 "Solution 1" (study std1)
    v1: Variables "Dependent Variables 1"
    s1: Stationary "Stationary Solver 1"
      dDef: Direct
      p1: Parametric
      fc1: FullyCoupled | linsolver = dDef

Datasets
  dset1: Solution | solution = sol1

Derived values
  gev1: EvalGlobal "PFdim, b_mean and loss density"
    data = none
    table = new
    expr = {2*pi*mf.freq * abs(intopFlux(mf.Bz)), abs(intopFlux(mf.Bz)) / A_c, intopFlux(mf.Qh)/A_c, intopFlux(mf.Qml)/A_c, intopFlux(mf.Qrh)/A_c}
    descr = {PFdim = v (abs), b_mean (abs), p_tot, p_mag, p_el}
  gev2: EvalGlobal "Voltages (all)" (disabled)
    data = none
    table = new
    expr = {2*pi*mf.freq * intopFlux(real(mf.Bz)), 2*pi*mf.freq * intopFlux(imag(mf.Bz)), 2*pi*mf.freq * intopFlux(mf.Bz), 2*pi*mf.freq * abs(intopFlux(mf.Bz))}
    descr = {v (real), v (imag), v (complex), v (abs)}

Plots
  pg3: PlotGroup2D "Magnetic Flux Density (mf)" on selection geom1_csel1_dom | data = dset1
    surf2: Surface "B" | expr = mf.normB

Exports
  plot1: Plot "Plot B"